<Lems>

    <!--

        This LEMS file has been automatically generated using PyNeuroML v0.3.5 (libNeuroML v0.2.34)

     -->

    <!-- Specify which component to run -->
    <Target component="Sim_M1"/>

    <!-- Include core NeuroML2 ComponentType definitions -->
    <Include file="Cells.xml"/>
    <Include file="Networks.xml"/>
    <Include file="Simulation.xml"/>

    <Include file="M1.net.nml"/>

    <Simulation id="Sim_M1" length="100ms" step="0.01ms" target="M1" seed="12345">  <!-- Note seed: ensures same random numbers used every run -->

        <Display id="DispPop__IT_L23" title="Membrane potentials of cells in IT_L23" timeScale="1ms" xmin="-10.0" xmax="110.0" ymin="-90" ymax="50">
            <Line id="IT_L23[0]: v" quantity="IT_L23/0/CELL_IT/v" scale="1mV" color="#89a94d" timeScale="1ms"/>
            <Line id="IT_L23[1]: v" quantity="IT_L23/1/CELL_IT/v" scale="1mV" color="#88f39d" timeScale="1ms"/>
            <Line id="IT_L23[2]: v" quantity="IT_L23/2/CELL_IT/v" scale="1mV" color="#9a5108" timeScale="1ms"/>
            <Line id="IT_L23[3]: v" quantity="IT_L23/3/CELL_IT/v" scale="1mV" color="#0d3414" timeScale="1ms"/>
            <Line id="IT_L23[4]: v" quantity="IT_L23/4/CELL_IT/v" scale="1mV" color="#bea69a" timeScale="1ms"/>
            <Line id="IT_L23[5]: v" quantity="IT_L23/5/CELL_IT/v" scale="1mV" color="#f71501" timeScale="1ms"/>
            <Line id="IT_L23[6]: v" quantity="IT_L23/6/CELL_IT/v" scale="1mV" color="#f5ff0b" timeScale="1ms"/>
            <Line id="IT_L23[7]: v" quantity="IT_L23/7/CELL_IT/v" scale="1mV" color="#fc9de4" timeScale="1ms"/>
            <Line id="IT_L23[8]: v" quantity="IT_L23/8/CELL_IT/v" scale="1mV" color="#c4a8c4" timeScale="1ms"/>
            <Line id="IT_L23[9]: v" quantity="IT_L23/9/CELL_IT/v" scale="1mV" color="#e3ac3f" timeScale="1ms"/>
            <Line id="IT_L23[10]: v" quantity="IT_L23/10/CELL_IT/v" scale="1mV" color="#acd6ee" timeScale="1ms"/>
            <Line id="IT_L23[11]: v" quantity="IT_L23/11/CELL_IT/v" scale="1mV" color="#f7a087" timeScale="1ms"/>
            <Line id="IT_L23[12]: v" quantity="IT_L23/12/CELL_IT/v" scale="1mV" color="#2cba55" timeScale="1ms"/>
            <Line id="IT_L23[13]: v" quantity="IT_L23/13/CELL_IT/v" scale="1mV" color="#a38904" timeScale="1ms"/>
            <Line id="IT_L23[14]: v" quantity="IT_L23/14/CELL_IT/v" scale="1mV" color="#1abfaf" timeScale="1ms"/>
            <Line id="IT_L23[15]: v" quantity="IT_L23/15/CELL_IT/v" scale="1mV" color="#561be8" timeScale="1ms"/>
            <Line id="IT_L23[16]: v" quantity="IT_L23/16/CELL_IT/v" scale="1mV" color="#3a368e" timeScale="1ms"/>
            <Line id="IT_L23[17]: v" quantity="IT_L23/17/CELL_IT/v" scale="1mV" color="#84f69a" timeScale="1ms"/>
            <Line id="IT_L23[18]: v" quantity="IT_L23/18/CELL_IT/v" scale="1mV" color="#6c48d1" timeScale="1ms"/>
            <Line id="IT_L23[19]: v" quantity="IT_L23/19/CELL_IT/v" scale="1mV" color="#b0b247" timeScale="1ms"/>
            <Line id="IT_L23[20]: v" quantity="IT_L23/20/CELL_IT/v" scale="1mV" color="#6226c4" timeScale="1ms"/>
            <Line id="IT_L23[21]: v" quantity="IT_L23/21/CELL_IT/v" scale="1mV" color="#b07c7f" timeScale="1ms"/>
            <Line id="IT_L23[22]: v" quantity="IT_L23/22/CELL_IT/v" scale="1mV" color="#9cea84" timeScale="1ms"/>
            <Line id="IT_L23[23]: v" quantity="IT_L23/23/CELL_IT/v" scale="1mV" color="#f51299" timeScale="1ms"/>
            <Line id="IT_L23[24]: v" quantity="IT_L23/24/CELL_IT/v" scale="1mV" color="#e9e9a1" timeScale="1ms"/>
            <Line id="IT_L23[25]: v" quantity="IT_L23/25/CELL_IT/v" scale="1mV" color="#e8f043" timeScale="1ms"/>
            <Line id="IT_L23[26]: v" quantity="IT_L23/26/CELL_IT/v" scale="1mV" color="#3a01da" timeScale="1ms"/>
            <Line id="IT_L23[27]: v" quantity="IT_L23/27/CELL_IT/v" scale="1mV" color="#fa661e" timeScale="1ms"/>
            <Line id="IT_L23[28]: v" quantity="IT_L23/28/CELL_IT/v" scale="1mV" color="#676a16" timeScale="1ms"/>
            <Line id="IT_L23[29]: v" quantity="IT_L23/29/CELL_IT/v" scale="1mV" color="#c8c686" timeScale="1ms"/>
            <Line id="IT_L23[30]: v" quantity="IT_L23/30/CELL_IT/v" scale="1mV" color="#6376ee" timeScale="1ms"/>
            <Line id="IT_L23[31]: v" quantity="IT_L23/31/CELL_IT/v" scale="1mV" color="#3f8903" timeScale="1ms"/>
            <Line id="IT_L23[32]: v" quantity="IT_L23/32/CELL_IT/v" scale="1mV" color="#c878a9" timeScale="1ms"/>
            <Line id="IT_L23[33]: v" quantity="IT_L23/33/CELL_IT/v" scale="1mV" color="#918b34" timeScale="1ms"/>
            <Line id="IT_L23[34]: v" quantity="IT_L23/34/CELL_IT/v" scale="1mV" color="#4041d6" timeScale="1ms"/>
            <Line id="IT_L23[35]: v" quantity="IT_L23/35/CELL_IT/v" scale="1mV" color="#d31f77" timeScale="1ms"/>
            <Line id="IT_L23[36]: v" quantity="IT_L23/36/CELL_IT/v" scale="1mV" color="#f714e7" timeScale="1ms"/>
            <Line id="IT_L23[37]: v" quantity="IT_L23/37/CELL_IT/v" scale="1mV" color="#a6f970" timeScale="1ms"/>
            <Line id="IT_L23[38]: v" quantity="IT_L23/38/CELL_IT/v" scale="1mV" color="#eb6a6b" timeScale="1ms"/>
            <Line id="IT_L23[39]: v" quantity="IT_L23/39/CELL_IT/v" scale="1mV" color="#c8d061" timeScale="1ms"/>
            <Line id="IT_L23[40]: v" quantity="IT_L23/40/CELL_IT/v" scale="1mV" color="#45d606" timeScale="1ms"/>
            <Line id="IT_L23[41]: v" quantity="IT_L23/41/CELL_IT/v" scale="1mV" color="#8f56aa" timeScale="1ms"/>
            <Line id="IT_L23[42]: v" quantity="IT_L23/42/CELL_IT/v" scale="1mV" color="#78ae5c" timeScale="1ms"/>
            <Line id="IT_L23[43]: v" quantity="IT_L23/43/CELL_IT/v" scale="1mV" color="#2380e8" timeScale="1ms"/>
            <Line id="IT_L23[44]: v" quantity="IT_L23/44/CELL_IT/v" scale="1mV" color="#6472f9" timeScale="1ms"/>
            <Line id="IT_L23[45]: v" quantity="IT_L23/45/CELL_IT/v" scale="1mV" color="#9a7af2" timeScale="1ms"/>
            <Line id="IT_L23[46]: v" quantity="IT_L23/46/CELL_IT/v" scale="1mV" color="#8a356d" timeScale="1ms"/>
            <Line id="IT_L23[47]: v" quantity="IT_L23/47/CELL_IT/v" scale="1mV" color="#dcc3f1" timeScale="1ms"/>
            <Line id="IT_L23[48]: v" quantity="IT_L23/48/CELL_IT/v" scale="1mV" color="#3b703b" timeScale="1ms"/>
            <Line id="IT_L23[49]: v" quantity="IT_L23/49/CELL_IT/v" scale="1mV" color="#86e520" timeScale="1ms"/>
            <Line id="IT_L23[50]: v" quantity="IT_L23/50/CELL_IT/v" scale="1mV" color="#c2d3b1" timeScale="1ms"/>
        </Display>

        <Display id="DispPop__IT_L4" title="Membrane potentials of cells in IT_L4" timeScale="1ms" xmin="-10.0" xmax="110.0" ymin="-90" ymax="50">
            <Line id="IT_L4[0]: v" quantity="IT_L4/0/CELL_IT/v" scale="1mV" color="#818619" timeScale="1ms"/>
            <Line id="IT_L4[1]: v" quantity="IT_L4/1/CELL_IT/v" scale="1mV" color="#7f9053" timeScale="1ms"/>
            <Line id="IT_L4[2]: v" quantity="IT_L4/2/CELL_IT/v" scale="1mV" color="#5d9807" timeScale="1ms"/>
            <Line id="IT_L4[3]: v" quantity="IT_L4/3/CELL_IT/v" scale="1mV" color="#3e718e" timeScale="1ms"/>
            <Line id="IT_L4[4]: v" quantity="IT_L4/4/CELL_IT/v" scale="1mV" color="#e3a154" timeScale="1ms"/>
            <Line id="IT_L4[5]: v" quantity="IT_L4/5/CELL_IT/v" scale="1mV" color="#bc6664" timeScale="1ms"/>
            <Line id="IT_L4[6]: v" quantity="IT_L4/6/CELL_IT/v" scale="1mV" color="#9d47eb" timeScale="1ms"/>
            <Line id="IT_L4[7]: v" quantity="IT_L4/7/CELL_IT/v" scale="1mV" color="#83938e" timeScale="1ms"/>
            <Line id="IT_L4[8]: v" quantity="IT_L4/8/CELL_IT/v" scale="1mV" color="#321ced" timeScale="1ms"/>
            <Line id="IT_L4[9]: v" quantity="IT_L4/9/CELL_IT/v" scale="1mV" color="#3008fb" timeScale="1ms"/>
            <Line id="IT_L4[10]: v" quantity="IT_L4/10/CELL_IT/v" scale="1mV" color="#580895" timeScale="1ms"/>
            <Line id="IT_L4[11]: v" quantity="IT_L4/11/CELL_IT/v" scale="1mV" color="#079989" timeScale="1ms"/>
            <Line id="IT_L4[12]: v" quantity="IT_L4/12/CELL_IT/v" scale="1mV" color="#7d8d2c" timeScale="1ms"/>
            <Line id="IT_L4[13]: v" quantity="IT_L4/13/CELL_IT/v" scale="1mV" color="#afac33" timeScale="1ms"/>
            <Line id="IT_L4[14]: v" quantity="IT_L4/14/CELL_IT/v" scale="1mV" color="#cb0115" timeScale="1ms"/>
            <Line id="IT_L4[15]: v" quantity="IT_L4/15/CELL_IT/v" scale="1mV" color="#150768" timeScale="1ms"/>
            <Line id="IT_L4[16]: v" quantity="IT_L4/16/CELL_IT/v" scale="1mV" color="#3b024a" timeScale="1ms"/>
            <Line id="IT_L4[17]: v" quantity="IT_L4/17/CELL_IT/v" scale="1mV" color="#b8a859" timeScale="1ms"/>
            <Line id="IT_L4[18]: v" quantity="IT_L4/18/CELL_IT/v" scale="1mV" color="#df2f4f" timeScale="1ms"/>
            <Line id="IT_L4[19]: v" quantity="IT_L4/19/CELL_IT/v" scale="1mV" color="#e7cd13" timeScale="1ms"/>
            <Line id="IT_L4[20]: v" quantity="IT_L4/20/CELL_IT/v" scale="1mV" color="#a79253" timeScale="1ms"/>
            <Line id="IT_L4[21]: v" quantity="IT_L4/21/CELL_IT/v" scale="1mV" color="#50d3a5" timeScale="1ms"/>
            <Line id="IT_L4[22]: v" quantity="IT_L4/22/CELL_IT/v" scale="1mV" color="#931d9e" timeScale="1ms"/>
            <Line id="IT_L4[23]: v" quantity="IT_L4/23/CELL_IT/v" scale="1mV" color="#8b273a" timeScale="1ms"/>
            <Line id="IT_L4[24]: v" quantity="IT_L4/24/CELL_IT/v" scale="1mV" color="#a31f00" timeScale="1ms"/>
            <Line id="IT_L4[25]: v" quantity="IT_L4/25/CELL_IT/v" scale="1mV" color="#d4d59e" timeScale="1ms"/>
        </Display>

        <Display id="DispPop__IT_L5A" title="Membrane potentials of cells in IT_L5A" timeScale="1ms" xmin="-10.0" xmax="110.0" ymin="-90" ymax="50">
            <Line id="IT_L5A[0]: v" quantity="IT_L5A/0/CELL_IT/v" scale="1mV" color="#ca9e5b" timeScale="1ms"/>
            <Line id="IT_L5A[1]: v" quantity="IT_L5A/1/CELL_IT/v" scale="1mV" color="#d48e4a" timeScale="1ms"/>
            <Line id="IT_L5A[2]: v" quantity="IT_L5A/2/CELL_IT/v" scale="1mV" color="#7d9d0d" timeScale="1ms"/>
            <Line id="IT_L5A[3]: v" quantity="IT_L5A/3/CELL_IT/v" scale="1mV" color="#614f2e" timeScale="1ms"/>
            <Line id="IT_L5A[4]: v" quantity="IT_L5A/4/CELL_IT/v" scale="1mV" color="#91f1d7" timeScale="1ms"/>
            <Line id="IT_L5A[5]: v" quantity="IT_L5A/5/CELL_IT/v" scale="1mV" color="#ffd899" timeScale="1ms"/>
            <Line id="IT_L5A[6]: v" quantity="IT_L5A/6/CELL_IT/v" scale="1mV" color="#76495c" timeScale="1ms"/>
            <Line id="IT_L5A[7]: v" quantity="IT_L5A/7/CELL_IT/v" scale="1mV" color="#9f7fb7" timeScale="1ms"/>
            <Line id="IT_L5A[8]: v" quantity="IT_L5A/8/CELL_IT/v" scale="1mV" color="#358250" timeScale="1ms"/>
            <Line id="IT_L5A[9]: v" quantity="IT_L5A/9/CELL_IT/v" scale="1mV" color="#81b6fe" timeScale="1ms"/>
            <Line id="IT_L5A[10]: v" quantity="IT_L5A/10/CELL_IT/v" scale="1mV" color="#640abb" timeScale="1ms"/>
            <Line id="IT_L5A[11]: v" quantity="IT_L5A/11/CELL_IT/v" scale="1mV" color="#308a97" timeScale="1ms"/>
            <Line id="IT_L5A[12]: v" quantity="IT_L5A/12/CELL_IT/v" scale="1mV" color="#044494" timeScale="1ms"/>
            <Line id="IT_L5A[13]: v" quantity="IT_L5A/13/CELL_IT/v" scale="1mV" color="#26a2fd" timeScale="1ms"/>
            <Line id="IT_L5A[14]: v" quantity="IT_L5A/14/CELL_IT/v" scale="1mV" color="#033e43" timeScale="1ms"/>
            <Line id="IT_L5A[15]: v" quantity="IT_L5A/15/CELL_IT/v" scale="1mV" color="#cc18d1" timeScale="1ms"/>
            <Line id="IT_L5A[16]: v" quantity="IT_L5A/16/CELL_IT/v" scale="1mV" color="#8172c6" timeScale="1ms"/>
            <Line id="IT_L5A[17]: v" quantity="IT_L5A/17/CELL_IT/v" scale="1mV" color="#9c60bf" timeScale="1ms"/>
            <Line id="IT_L5A[18]: v" quantity="IT_L5A/18/CELL_IT/v" scale="1mV" color="#cae822" timeScale="1ms"/>
            <Line id="IT_L5A[19]: v" quantity="IT_L5A/19/CELL_IT/v" scale="1mV" color="#6ae231" timeScale="1ms"/>
            <Line id="IT_L5A[20]: v" quantity="IT_L5A/20/CELL_IT/v" scale="1mV" color="#5d6f62" timeScale="1ms"/>
            <Line id="IT_L5A[21]: v" quantity="IT_L5A/21/CELL_IT/v" scale="1mV" color="#42b79c" timeScale="1ms"/>
            <Line id="IT_L5A[22]: v" quantity="IT_L5A/22/CELL_IT/v" scale="1mV" color="#96554a" timeScale="1ms"/>
            <Line id="IT_L5A[23]: v" quantity="IT_L5A/23/CELL_IT/v" scale="1mV" color="#116f79" timeScale="1ms"/>
            <Line id="IT_L5A[24]: v" quantity="IT_L5A/24/CELL_IT/v" scale="1mV" color="#18fb99" timeScale="1ms"/>
            <Line id="IT_L5A[25]: v" quantity="IT_L5A/25/CELL_IT/v" scale="1mV" color="#35b5c7" timeScale="1ms"/>
            <Line id="IT_L5A[26]: v" quantity="IT_L5A/26/CELL_IT/v" scale="1mV" color="#6b0eb4" timeScale="1ms"/>
            <Line id="IT_L5A[27]: v" quantity="IT_L5A/27/CELL_IT/v" scale="1mV" color="#64e97e" timeScale="1ms"/>
            <Line id="IT_L5A[28]: v" quantity="IT_L5A/28/CELL_IT/v" scale="1mV" color="#74bee0" timeScale="1ms"/>
        </Display>

        <Display id="DispPop__IT_L5B" title="Membrane potentials of cells in IT_L5B" timeScale="1ms" xmin="-10.0" xmax="110.0" ymin="-90" ymax="50">
            <Line id="IT_L5B[0]: v" quantity="IT_L5B/0/CELL_IT/v" scale="1mV" color="#1bd5fb" timeScale="1ms"/>
            <Line id="IT_L5B[1]: v" quantity="IT_L5B/1/CELL_IT/v" scale="1mV" color="#99a795" timeScale="1ms"/>
            <Line id="IT_L5B[2]: v" quantity="IT_L5B/2/CELL_IT/v" scale="1mV" color="#e716ad" timeScale="1ms"/>
            <Line id="IT_L5B[3]: v" quantity="IT_L5B/3/CELL_IT/v" scale="1mV" color="#ab782b" timeScale="1ms"/>
            <Line id="IT_L5B[4]: v" quantity="IT_L5B/4/CELL_IT/v" scale="1mV" color="#96d2e3" timeScale="1ms"/>
            <Line id="IT_L5B[5]: v" quantity="IT_L5B/5/CELL_IT/v" scale="1mV" color="#b7eaeb" timeScale="1ms"/>
            <Line id="IT_L5B[6]: v" quantity="IT_L5B/6/CELL_IT/v" scale="1mV" color="#522930" timeScale="1ms"/>
            <Line id="IT_L5B[7]: v" quantity="IT_L5B/7/CELL_IT/v" scale="1mV" color="#993c15" timeScale="1ms"/>
            <Line id="IT_L5B[8]: v" quantity="IT_L5B/8/CELL_IT/v" scale="1mV" color="#b970ce" timeScale="1ms"/>
            <Line id="IT_L5B[9]: v" quantity="IT_L5B/9/CELL_IT/v" scale="1mV" color="#46ac90" timeScale="1ms"/>
            <Line id="IT_L5B[10]: v" quantity="IT_L5B/10/CELL_IT/v" scale="1mV" color="#e0b82a" timeScale="1ms"/>
            <Line id="IT_L5B[11]: v" quantity="IT_L5B/11/CELL_IT/v" scale="1mV" color="#97e2e2" timeScale="1ms"/>
            <Line id="IT_L5B[12]: v" quantity="IT_L5B/12/CELL_IT/v" scale="1mV" color="#c0b332" timeScale="1ms"/>
            <Line id="IT_L5B[13]: v" quantity="IT_L5B/13/CELL_IT/v" scale="1mV" color="#b2fcaa" timeScale="1ms"/>
            <Line id="IT_L5B[14]: v" quantity="IT_L5B/14/CELL_IT/v" scale="1mV" color="#e91c5a" timeScale="1ms"/>
            <Line id="IT_L5B[15]: v" quantity="IT_L5B/15/CELL_IT/v" scale="1mV" color="#46735b" timeScale="1ms"/>
            <Line id="IT_L5B[16]: v" quantity="IT_L5B/16/CELL_IT/v" scale="1mV" color="#e948c7" timeScale="1ms"/>
            <Line id="IT_L5B[17]: v" quantity="IT_L5B/17/CELL_IT/v" scale="1mV" color="#f1c6ba" timeScale="1ms"/>
            <Line id="IT_L5B[18]: v" quantity="IT_L5B/18/CELL_IT/v" scale="1mV" color="#91d232" timeScale="1ms"/>
            <Line id="IT_L5B[19]: v" quantity="IT_L5B/19/CELL_IT/v" scale="1mV" color="#b8694f" timeScale="1ms"/>
            <Line id="IT_L5B[20]: v" quantity="IT_L5B/20/CELL_IT/v" scale="1mV" color="#a1c43d" timeScale="1ms"/>
            <Line id="IT_L5B[21]: v" quantity="IT_L5B/21/CELL_IT/v" scale="1mV" color="#3d2a2a" timeScale="1ms"/>
            <Line id="IT_L5B[22]: v" quantity="IT_L5B/22/CELL_IT/v" scale="1mV" color="#39cea1" timeScale="1ms"/>
            <Line id="IT_L5B[23]: v" quantity="IT_L5B/23/CELL_IT/v" scale="1mV" color="#96df80" timeScale="1ms"/>
            <Line id="IT_L5B[24]: v" quantity="IT_L5B/24/CELL_IT/v" scale="1mV" color="#910195" timeScale="1ms"/>
            <Line id="IT_L5B[25]: v" quantity="IT_L5B/25/CELL_IT/v" scale="1mV" color="#fe92d7" timeScale="1ms"/>
            <Line id="IT_L5B[26]: v" quantity="IT_L5B/26/CELL_IT/v" scale="1mV" color="#b45a6e" timeScale="1ms"/>
            <Line id="IT_L5B[27]: v" quantity="IT_L5B/27/CELL_IT/v" scale="1mV" color="#525756" timeScale="1ms"/>
            <Line id="IT_L5B[28]: v" quantity="IT_L5B/28/CELL_IT/v" scale="1mV" color="#2783d0" timeScale="1ms"/>
            <Line id="IT_L5B[29]: v" quantity="IT_L5B/29/CELL_IT/v" scale="1mV" color="#46729a" timeScale="1ms"/>
            <Line id="IT_L5B[30]: v" quantity="IT_L5B/30/CELL_IT/v" scale="1mV" color="#75bc13" timeScale="1ms"/>
            <Line id="IT_L5B[31]: v" quantity="IT_L5B/31/CELL_IT/v" scale="1mV" color="#c4d2b6" timeScale="1ms"/>
            <Line id="IT_L5B[32]: v" quantity="IT_L5B/32/CELL_IT/v" scale="1mV" color="#9c7525" timeScale="1ms"/>
        </Display>

        <Display id="DispPop__PT_L5B" title="Membrane potentials of cells in PT_L5B" timeScale="1ms" xmin="-10.0" xmax="110.0" ymin="-90" ymax="50">
            <Line id="PT_L5B[0]: v" quantity="PT_L5B/0/CELL_PT/v" scale="1mV" color="#a99297" timeScale="1ms"/>
            <Line id="PT_L5B[1]: v" quantity="PT_L5B/1/CELL_PT/v" scale="1mV" color="#5dee62" timeScale="1ms"/>
            <Line id="PT_L5B[2]: v" quantity="PT_L5B/2/CELL_PT/v" scale="1mV" color="#31257e" timeScale="1ms"/>
            <Line id="PT_L5B[3]: v" quantity="PT_L5B/3/CELL_PT/v" scale="1mV" color="#02608f" timeScale="1ms"/>
            <Line id="PT_L5B[4]: v" quantity="PT_L5B/4/CELL_PT/v" scale="1mV" color="#638946" timeScale="1ms"/>
            <Line id="PT_L5B[5]: v" quantity="PT_L5B/5/CELL_PT/v" scale="1mV" color="#c1f61f" timeScale="1ms"/>
            <Line id="PT_L5B[6]: v" quantity="PT_L5B/6/CELL_PT/v" scale="1mV" color="#e18ad4" timeScale="1ms"/>
            <Line id="PT_L5B[7]: v" quantity="PT_L5B/7/CELL_PT/v" scale="1mV" color="#86c303" timeScale="1ms"/>
            <Line id="PT_L5B[8]: v" quantity="PT_L5B/8/CELL_PT/v" scale="1mV" color="#a5095a" timeScale="1ms"/>
            <Line id="PT_L5B[9]: v" quantity="PT_L5B/9/CELL_PT/v" scale="1mV" color="#ecfe82" timeScale="1ms"/>
            <Line id="PT_L5B[10]: v" quantity="PT_L5B/10/CELL_PT/v" scale="1mV" color="#df2bbb" timeScale="1ms"/>
            <Line id="PT_L5B[11]: v" quantity="PT_L5B/11/CELL_PT/v" scale="1mV" color="#424762" timeScale="1ms"/>
            <Line id="PT_L5B[12]: v" quantity="PT_L5B/12/CELL_PT/v" scale="1mV" color="#79e5c1" timeScale="1ms"/>
            <Line id="PT_L5B[13]: v" quantity="PT_L5B/13/CELL_PT/v" scale="1mV" color="#904561" timeScale="1ms"/>
            <Line id="PT_L5B[14]: v" quantity="PT_L5B/14/CELL_PT/v" scale="1mV" color="#ab1e21" timeScale="1ms"/>
            <Line id="PT_L5B[15]: v" quantity="PT_L5B/15/CELL_PT/v" scale="1mV" color="#eee944" timeScale="1ms"/>
            <Line id="PT_L5B[16]: v" quantity="PT_L5B/16/CELL_PT/v" scale="1mV" color="#f18eca" timeScale="1ms"/>
            <Line id="PT_L5B[17]: v" quantity="PT_L5B/17/CELL_PT/v" scale="1mV" color="#c09794" timeScale="1ms"/>
            <Line id="PT_L5B[18]: v" quantity="PT_L5B/18/CELL_PT/v" scale="1mV" color="#b68d65" timeScale="1ms"/>
            <Line id="PT_L5B[19]: v" quantity="PT_L5B/19/CELL_PT/v" scale="1mV" color="#f09486" timeScale="1ms"/>
            <Line id="PT_L5B[20]: v" quantity="PT_L5B/20/CELL_PT/v" scale="1mV" color="#3a8397" timeScale="1ms"/>
            <Line id="PT_L5B[21]: v" quantity="PT_L5B/21/CELL_PT/v" scale="1mV" color="#23cd3e" timeScale="1ms"/>
            <Line id="PT_L5B[22]: v" quantity="PT_L5B/22/CELL_PT/v" scale="1mV" color="#cd3caa" timeScale="1ms"/>
            <Line id="PT_L5B[23]: v" quantity="PT_L5B/23/CELL_PT/v" scale="1mV" color="#5e3d83" timeScale="1ms"/>
            <Line id="PT_L5B[24]: v" quantity="PT_L5B/24/CELL_PT/v" scale="1mV" color="#c523be" timeScale="1ms"/>
            <Line id="PT_L5B[25]: v" quantity="PT_L5B/25/CELL_PT/v" scale="1mV" color="#294d41" timeScale="1ms"/>
            <Line id="PT_L5B[26]: v" quantity="PT_L5B/26/CELL_PT/v" scale="1mV" color="#0c0eed" timeScale="1ms"/>
            <Line id="PT_L5B[27]: v" quantity="PT_L5B/27/CELL_PT/v" scale="1mV" color="#1b7456" timeScale="1ms"/>
            <Line id="PT_L5B[28]: v" quantity="PT_L5B/28/CELL_PT/v" scale="1mV" color="#8b9fae" timeScale="1ms"/>
            <Line id="PT_L5B[29]: v" quantity="PT_L5B/29/CELL_PT/v" scale="1mV" color="#662c4c" timeScale="1ms"/>
            <Line id="PT_L5B[30]: v" quantity="PT_L5B/30/CELL_PT/v" scale="1mV" color="#67bb5a" timeScale="1ms"/>
            <Line id="PT_L5B[31]: v" quantity="PT_L5B/31/CELL_PT/v" scale="1mV" color="#e3f6ac" timeScale="1ms"/>
            <Line id="PT_L5B[32]: v" quantity="PT_L5B/32/CELL_PT/v" scale="1mV" color="#bd8254" timeScale="1ms"/>
        </Display>

        <Display id="DispPop__IT_L6" title="Membrane potentials of cells in IT_L6" timeScale="1ms" xmin="-10.0" xmax="110.0" ymin="-90" ymax="50">
            <Line id="IT_L6[0]: v" quantity="IT_L6/0/CELL_IT/v" scale="1mV" color="#de930f" timeScale="1ms"/>
            <Line id="IT_L6[1]: v" quantity="IT_L6/1/CELL_IT/v" scale="1mV" color="#052ff7" timeScale="1ms"/>
            <Line id="IT_L6[2]: v" quantity="IT_L6/2/CELL_IT/v" scale="1mV" color="#f2d584" timeScale="1ms"/>
            <Line id="IT_L6[3]: v" quantity="IT_L6/3/CELL_IT/v" scale="1mV" color="#043a99" timeScale="1ms"/>
            <Line id="IT_L6[4]: v" quantity="IT_L6/4/CELL_IT/v" scale="1mV" color="#b9d253" timeScale="1ms"/>
            <Line id="IT_L6[5]: v" quantity="IT_L6/5/CELL_IT/v" scale="1mV" color="#20dbb9" timeScale="1ms"/>
            <Line id="IT_L6[6]: v" quantity="IT_L6/6/CELL_IT/v" scale="1mV" color="#dfa515" timeScale="1ms"/>
            <Line id="IT_L6[7]: v" quantity="IT_L6/7/CELL_IT/v" scale="1mV" color="#20c4f3" timeScale="1ms"/>
            <Line id="IT_L6[8]: v" quantity="IT_L6/8/CELL_IT/v" scale="1mV" color="#0f5c21" timeScale="1ms"/>
            <Line id="IT_L6[9]: v" quantity="IT_L6/9/CELL_IT/v" scale="1mV" color="#356c38" timeScale="1ms"/>
            <Line id="IT_L6[10]: v" quantity="IT_L6/10/CELL_IT/v" scale="1mV" color="#940d7a" timeScale="1ms"/>
            <Line id="IT_L6[11]: v" quantity="IT_L6/11/CELL_IT/v" scale="1mV" color="#8e1b21" timeScale="1ms"/>
            <Line id="IT_L6[12]: v" quantity="IT_L6/12/CELL_IT/v" scale="1mV" color="#73c032" timeScale="1ms"/>
            <Line id="IT_L6[13]: v" quantity="IT_L6/13/CELL_IT/v" scale="1mV" color="#cadbaf" timeScale="1ms"/>
            <Line id="IT_L6[14]: v" quantity="IT_L6/14/CELL_IT/v" scale="1mV" color="#84cdf6" timeScale="1ms"/>
            <Line id="IT_L6[15]: v" quantity="IT_L6/15/CELL_IT/v" scale="1mV" color="#66644d" timeScale="1ms"/>
            <Line id="IT_L6[16]: v" quantity="IT_L6/16/CELL_IT/v" scale="1mV" color="#f5a383" timeScale="1ms"/>
            <Line id="IT_L6[17]: v" quantity="IT_L6/17/CELL_IT/v" scale="1mV" color="#ba22fd" timeScale="1ms"/>
            <Line id="IT_L6[18]: v" quantity="IT_L6/18/CELL_IT/v" scale="1mV" color="#eed0be" timeScale="1ms"/>
            <Line id="IT_L6[19]: v" quantity="IT_L6/19/CELL_IT/v" scale="1mV" color="#2847b4" timeScale="1ms"/>
            <Line id="IT_L6[20]: v" quantity="IT_L6/20/CELL_IT/v" scale="1mV" color="#09ba02" timeScale="1ms"/>
            <Line id="IT_L6[21]: v" quantity="IT_L6/21/CELL_IT/v" scale="1mV" color="#b1d8c8" timeScale="1ms"/>
            <Line id="IT_L6[22]: v" quantity="IT_L6/22/CELL_IT/v" scale="1mV" color="#d17de6" timeScale="1ms"/>
            <Line id="IT_L6[23]: v" quantity="IT_L6/23/CELL_IT/v" scale="1mV" color="#1a3dab" timeScale="1ms"/>
            <Line id="IT_L6[24]: v" quantity="IT_L6/24/CELL_IT/v" scale="1mV" color="#a4f3e3" timeScale="1ms"/>
            <Line id="IT_L6[25]: v" quantity="IT_L6/25/CELL_IT/v" scale="1mV" color="#50e19b" timeScale="1ms"/>
            <Line id="IT_L6[26]: v" quantity="IT_L6/26/CELL_IT/v" scale="1mV" color="#f40008" timeScale="1ms"/>
            <Line id="IT_L6[27]: v" quantity="IT_L6/27/CELL_IT/v" scale="1mV" color="#c1e662" timeScale="1ms"/>
            <Line id="IT_L6[28]: v" quantity="IT_L6/28/CELL_IT/v" scale="1mV" color="#3e97bb" timeScale="1ms"/>
            <Line id="IT_L6[29]: v" quantity="IT_L6/29/CELL_IT/v" scale="1mV" color="#5f1b7b" timeScale="1ms"/>
            <Line id="IT_L6[30]: v" quantity="IT_L6/30/CELL_IT/v" scale="1mV" color="#c4c2c0" timeScale="1ms"/>
        </Display>

        <Display id="DispPop__CT_L6" title="Membrane potentials of cells in CT_L6" timeScale="1ms" xmin="-10.0" xmax="110.0" ymin="-90" ymax="50">
            <Line id="CT_L6[0]: v" quantity="CT_L6/0/CELL_CT/v" scale="1mV" color="#7d6ebf" timeScale="1ms"/>
            <Line id="CT_L6[1]: v" quantity="CT_L6/1/CELL_CT/v" scale="1mV" color="#4c499f" timeScale="1ms"/>
            <Line id="CT_L6[2]: v" quantity="CT_L6/2/CELL_CT/v" scale="1mV" color="#9d930b" timeScale="1ms"/>
            <Line id="CT_L6[3]: v" quantity="CT_L6/3/CELL_CT/v" scale="1mV" color="#010656" timeScale="1ms"/>
            <Line id="CT_L6[4]: v" quantity="CT_L6/4/CELL_CT/v" scale="1mV" color="#378a38" timeScale="1ms"/>
            <Line id="CT_L6[5]: v" quantity="CT_L6/5/CELL_CT/v" scale="1mV" color="#4a13c1" timeScale="1ms"/>
            <Line id="CT_L6[6]: v" quantity="CT_L6/6/CELL_CT/v" scale="1mV" color="#7a1459" timeScale="1ms"/>
            <Line id="CT_L6[7]: v" quantity="CT_L6/7/CELL_CT/v" scale="1mV" color="#562b8f" timeScale="1ms"/>
            <Line id="CT_L6[8]: v" quantity="CT_L6/8/CELL_CT/v" scale="1mV" color="#640de2" timeScale="1ms"/>
            <Line id="CT_L6[9]: v" quantity="CT_L6/9/CELL_CT/v" scale="1mV" color="#493b0f" timeScale="1ms"/>
            <Line id="CT_L6[10]: v" quantity="CT_L6/10/CELL_CT/v" scale="1mV" color="#1bfe9f" timeScale="1ms"/>
            <Line id="CT_L6[11]: v" quantity="CT_L6/11/CELL_CT/v" scale="1mV" color="#d791b6" timeScale="1ms"/>
            <Line id="CT_L6[12]: v" quantity="CT_L6/12/CELL_CT/v" scale="1mV" color="#10e4bb" timeScale="1ms"/>
            <Line id="CT_L6[13]: v" quantity="CT_L6/13/CELL_CT/v" scale="1mV" color="#ae90ed" timeScale="1ms"/>
            <Line id="CT_L6[14]: v" quantity="CT_L6/14/CELL_CT/v" scale="1mV" color="#3fab9e" timeScale="1ms"/>
            <Line id="CT_L6[15]: v" quantity="CT_L6/15/CELL_CT/v" scale="1mV" color="#6f2da2" timeScale="1ms"/>
            <Line id="CT_L6[16]: v" quantity="CT_L6/16/CELL_CT/v" scale="1mV" color="#16f8a7" timeScale="1ms"/>
            <Line id="CT_L6[17]: v" quantity="CT_L6/17/CELL_CT/v" scale="1mV" color="#492b13" timeScale="1ms"/>
            <Line id="CT_L6[18]: v" quantity="CT_L6/18/CELL_CT/v" scale="1mV" color="#3cc824" timeScale="1ms"/>
            <Line id="CT_L6[19]: v" quantity="CT_L6/19/CELL_CT/v" scale="1mV" color="#ac4658" timeScale="1ms"/>
            <Line id="CT_L6[20]: v" quantity="CT_L6/20/CELL_CT/v" scale="1mV" color="#7180e1" timeScale="1ms"/>
            <Line id="CT_L6[21]: v" quantity="CT_L6/21/CELL_CT/v" scale="1mV" color="#04a66f" timeScale="1ms"/>
            <Line id="CT_L6[22]: v" quantity="CT_L6/22/CELL_CT/v" scale="1mV" color="#9592fe" timeScale="1ms"/>
            <Line id="CT_L6[23]: v" quantity="CT_L6/23/CELL_CT/v" scale="1mV" color="#617de1" timeScale="1ms"/>
            <Line id="CT_L6[24]: v" quantity="CT_L6/24/CELL_CT/v" scale="1mV" color="#60e8ad" timeScale="1ms"/>
            <Line id="CT_L6[25]: v" quantity="CT_L6/25/CELL_CT/v" scale="1mV" color="#ca7f17" timeScale="1ms"/>
            <Line id="CT_L6[26]: v" quantity="CT_L6/26/CELL_CT/v" scale="1mV" color="#3fe5fe" timeScale="1ms"/>
            <Line id="CT_L6[27]: v" quantity="CT_L6/27/CELL_CT/v" scale="1mV" color="#9c8e29" timeScale="1ms"/>
            <Line id="CT_L6[28]: v" quantity="CT_L6/28/CELL_CT/v" scale="1mV" color="#9ac90a" timeScale="1ms"/>
            <Line id="CT_L6[29]: v" quantity="CT_L6/29/CELL_CT/v" scale="1mV" color="#e2ac9c" timeScale="1ms"/>
            <Line id="CT_L6[30]: v" quantity="CT_L6/30/CELL_CT/v" scale="1mV" color="#53158c" timeScale="1ms"/>
        </Display>

        <Display id="DispPop__PV_L23" title="Membrane potentials of cells in PV_L23" timeScale="1ms" xmin="-10.0" xmax="110.0" ymin="-90" ymax="50">
            <Line id="PV_L23[0]: v" quantity="PV_L23/0/CELL_PV/v" scale="1mV" color="#c0044e" timeScale="1ms"/>
            <Line id="PV_L23[1]: v" quantity="PV_L23/1/CELL_PV/v" scale="1mV" color="#49a1fd" timeScale="1ms"/>
            <Line id="PV_L23[2]: v" quantity="PV_L23/2/CELL_PV/v" scale="1mV" color="#f0e715" timeScale="1ms"/>
            <Line id="PV_L23[3]: v" quantity="PV_L23/3/CELL_PV/v" scale="1mV" color="#7158e7" timeScale="1ms"/>
            <Line id="PV_L23[4]: v" quantity="PV_L23/4/CELL_PV/v" scale="1mV" color="#5ac72a" timeScale="1ms"/>
            <Line id="PV_L23[5]: v" quantity="PV_L23/5/CELL_PV/v" scale="1mV" color="#2c9d06" timeScale="1ms"/>
            <Line id="PV_L23[6]: v" quantity="PV_L23/6/CELL_PV/v" scale="1mV" color="#fd8ea4" timeScale="1ms"/>
        </Display>

        <Display id="DispPop__SOM_L23" title="Membrane potentials of cells in SOM_L23" timeScale="1ms" xmin="-10.0" xmax="110.0" ymin="-90" ymax="50">
            <Line id="SOM_L23[0]: v" quantity="SOM_L23/0/CELL_SOM/v" scale="1mV" color="#bfcde1" timeScale="1ms"/>
            <Line id="SOM_L23[1]: v" quantity="SOM_L23/1/CELL_SOM/v" scale="1mV" color="#f5152d" timeScale="1ms"/>
            <Line id="SOM_L23[2]: v" quantity="SOM_L23/2/CELL_SOM/v" scale="1mV" color="#9b26d8" timeScale="1ms"/>
            <Line id="SOM_L23[3]: v" quantity="SOM_L23/3/CELL_SOM/v" scale="1mV" color="#8b7bc0" timeScale="1ms"/>
            <Line id="SOM_L23[4]: v" quantity="SOM_L23/4/CELL_SOM/v" scale="1mV" color="#eae5b7" timeScale="1ms"/>
            <Line id="SOM_L23[5]: v" quantity="SOM_L23/5/CELL_SOM/v" scale="1mV" color="#3af2ba" timeScale="1ms"/>
            <Line id="SOM_L23[6]: v" quantity="SOM_L23/6/CELL_SOM/v" scale="1mV" color="#a7a2fa" timeScale="1ms"/>
        </Display>

        <Display id="DispPop__PV_L5" title="Membrane potentials of cells in PV_L5" timeScale="1ms" xmin="-10.0" xmax="110.0" ymin="-90" ymax="50">
            <Line id="PV_L5[0]: v" quantity="PV_L5/0/CELL_PV/v" scale="1mV" color="#f48439" timeScale="1ms"/>
            <Line id="PV_L5[1]: v" quantity="PV_L5/1/CELL_PV/v" scale="1mV" color="#21acac" timeScale="1ms"/>
            <Line id="PV_L5[2]: v" quantity="PV_L5/2/CELL_PV/v" scale="1mV" color="#59a96b" timeScale="1ms"/>
            <Line id="PV_L5[3]: v" quantity="PV_L5/3/CELL_PV/v" scale="1mV" color="#e2dc7a" timeScale="1ms"/>
            <Line id="PV_L5[4]: v" quantity="PV_L5/4/CELL_PV/v" scale="1mV" color="#b741b8" timeScale="1ms"/>
            <Line id="PV_L5[5]: v" quantity="PV_L5/5/CELL_PV/v" scale="1mV" color="#75c374" timeScale="1ms"/>
            <Line id="PV_L5[6]: v" quantity="PV_L5/6/CELL_PV/v" scale="1mV" color="#3804a5" timeScale="1ms"/>
            <Line id="PV_L5[7]: v" quantity="PV_L5/7/CELL_PV/v" scale="1mV" color="#c2ec61" timeScale="1ms"/>
            <Line id="PV_L5[8]: v" quantity="PV_L5/8/CELL_PV/v" scale="1mV" color="#c21c5f" timeScale="1ms"/>
            <Line id="PV_L5[9]: v" quantity="PV_L5/9/CELL_PV/v" scale="1mV" color="#548678" timeScale="1ms"/>
            <Line id="PV_L5[10]: v" quantity="PV_L5/10/CELL_PV/v" scale="1mV" color="#272939" timeScale="1ms"/>
            <Line id="PV_L5[11]: v" quantity="PV_L5/11/CELL_PV/v" scale="1mV" color="#651376" timeScale="1ms"/>
            <Line id="PV_L5[12]: v" quantity="PV_L5/12/CELL_PV/v" scale="1mV" color="#e66392" timeScale="1ms"/>
            <Line id="PV_L5[13]: v" quantity="PV_L5/13/CELL_PV/v" scale="1mV" color="#e5163e" timeScale="1ms"/>
            <Line id="PV_L5[14]: v" quantity="PV_L5/14/CELL_PV/v" scale="1mV" color="#73b919" timeScale="1ms"/>
        </Display>

        <Display id="DispPop__SOM_L5" title="Membrane potentials of cells in SOM_L5" timeScale="1ms" xmin="-10.0" xmax="110.0" ymin="-90" ymax="50">
            <Line id="SOM_L5[0]: v" quantity="SOM_L5/0/CELL_SOM/v" scale="1mV" color="#4a7711" timeScale="1ms"/>
            <Line id="SOM_L5[1]: v" quantity="SOM_L5/1/CELL_SOM/v" scale="1mV" color="#cc0bab" timeScale="1ms"/>
            <Line id="SOM_L5[2]: v" quantity="SOM_L5/2/CELL_SOM/v" scale="1mV" color="#0002ce" timeScale="1ms"/>
            <Line id="SOM_L5[3]: v" quantity="SOM_L5/3/CELL_SOM/v" scale="1mV" color="#c97b1e" timeScale="1ms"/>
            <Line id="SOM_L5[4]: v" quantity="SOM_L5/4/CELL_SOM/v" scale="1mV" color="#9f7f08" timeScale="1ms"/>
            <Line id="SOM_L5[5]: v" quantity="SOM_L5/5/CELL_SOM/v" scale="1mV" color="#d7f329" timeScale="1ms"/>
            <Line id="SOM_L5[6]: v" quantity="SOM_L5/6/CELL_SOM/v" scale="1mV" color="#11e575" timeScale="1ms"/>
            <Line id="SOM_L5[7]: v" quantity="SOM_L5/7/CELL_SOM/v" scale="1mV" color="#9eaeed" timeScale="1ms"/>
            <Line id="SOM_L5[8]: v" quantity="SOM_L5/8/CELL_SOM/v" scale="1mV" color="#1aa12d" timeScale="1ms"/>
            <Line id="SOM_L5[9]: v" quantity="SOM_L5/9/CELL_SOM/v" scale="1mV" color="#75ad03" timeScale="1ms"/>
            <Line id="SOM_L5[10]: v" quantity="SOM_L5/10/CELL_SOM/v" scale="1mV" color="#1622d8" timeScale="1ms"/>
            <Line id="SOM_L5[11]: v" quantity="SOM_L5/11/CELL_SOM/v" scale="1mV" color="#da1a8e" timeScale="1ms"/>
            <Line id="SOM_L5[12]: v" quantity="SOM_L5/12/CELL_SOM/v" scale="1mV" color="#5798a8" timeScale="1ms"/>
            <Line id="SOM_L5[13]: v" quantity="SOM_L5/13/CELL_SOM/v" scale="1mV" color="#c0bb1f" timeScale="1ms"/>
            <Line id="SOM_L5[14]: v" quantity="SOM_L5/14/CELL_SOM/v" scale="1mV" color="#e920b7" timeScale="1ms"/>
        </Display>

        <Display id="DispPop__PV_L6" title="Membrane potentials of cells in PV_L6" timeScale="1ms" xmin="-10.0" xmax="110.0" ymin="-90" ymax="50">
            <Line id="PV_L6[0]: v" quantity="PV_L6/0/CELL_PV/v" scale="1mV" color="#a8dc20" timeScale="1ms"/>
            <Line id="PV_L6[1]: v" quantity="PV_L6/1/CELL_PV/v" scale="1mV" color="#ee6b83" timeScale="1ms"/>
            <Line id="PV_L6[2]: v" quantity="PV_L6/2/CELL_PV/v" scale="1mV" color="#f9e7cf" timeScale="1ms"/>
            <Line id="PV_L6[3]: v" quantity="PV_L6/3/CELL_PV/v" scale="1mV" color="#04b503" timeScale="1ms"/>
            <Line id="PV_L6[4]: v" quantity="PV_L6/4/CELL_PV/v" scale="1mV" color="#77a43f" timeScale="1ms"/>
            <Line id="PV_L6[5]: v" quantity="PV_L6/5/CELL_PV/v" scale="1mV" color="#108580" timeScale="1ms"/>
            <Line id="PV_L6[6]: v" quantity="PV_L6/6/CELL_PV/v" scale="1mV" color="#f9d132" timeScale="1ms"/>
        </Display>

        <Display id="DispPop__SOM_L6" title="Membrane potentials of cells in SOM_L6" timeScale="1ms" xmin="-10.0" xmax="110.0" ymin="-90" ymax="50">
            <Line id="SOM_L6[0]: v" quantity="SOM_L6/0/CELL_SOM/v" scale="1mV" color="#843806" timeScale="1ms"/>
            <Line id="SOM_L6[1]: v" quantity="SOM_L6/1/CELL_SOM/v" scale="1mV" color="#917af4" timeScale="1ms"/>
            <Line id="SOM_L6[2]: v" quantity="SOM_L6/2/CELL_SOM/v" scale="1mV" color="#2f7e40" timeScale="1ms"/>
            <Line id="SOM_L6[3]: v" quantity="SOM_L6/3/CELL_SOM/v" scale="1mV" color="#b51a5e" timeScale="1ms"/>
            <Line id="SOM_L6[4]: v" quantity="SOM_L6/4/CELL_SOM/v" scale="1mV" color="#92140e" timeScale="1ms"/>
            <Line id="SOM_L6[5]: v" quantity="SOM_L6/5/CELL_SOM/v" scale="1mV" color="#052e1f" timeScale="1ms"/>
            <Line id="SOM_L6[6]: v" quantity="SOM_L6/6/CELL_SOM/v" scale="1mV" color="#d0773d" timeScale="1ms"/>
        </Display>

        <OutputFile id="Volts_file__IT_L23" fileName="Sim_M1.IT_L23.v.dat">
            <OutputColumn id="v_IT_L23_0_CELL_IT_v" quantity="IT_L23/0/CELL_IT/v"/>
            <OutputColumn id="v_IT_L23_1_CELL_IT_v" quantity="IT_L23/1/CELL_IT/v"/>
            <OutputColumn id="v_IT_L23_2_CELL_IT_v" quantity="IT_L23/2/CELL_IT/v"/>
            <OutputColumn id="v_IT_L23_3_CELL_IT_v" quantity="IT_L23/3/CELL_IT/v"/>
            <OutputColumn id="v_IT_L23_4_CELL_IT_v" quantity="IT_L23/4/CELL_IT/v"/>
            <OutputColumn id="v_IT_L23_5_CELL_IT_v" quantity="IT_L23/5/CELL_IT/v"/>
            <OutputColumn id="v_IT_L23_6_CELL_IT_v" quantity="IT_L23/6/CELL_IT/v"/>
            <OutputColumn id="v_IT_L23_7_CELL_IT_v" quantity="IT_L23/7/CELL_IT/v"/>
            <OutputColumn id="v_IT_L23_8_CELL_IT_v" quantity="IT_L23/8/CELL_IT/v"/>
            <OutputColumn id="v_IT_L23_9_CELL_IT_v" quantity="IT_L23/9/CELL_IT/v"/>
            <OutputColumn id="v_IT_L23_10_CELL_IT_v" quantity="IT_L23/10/CELL_IT/v"/>
            <OutputColumn id="v_IT_L23_11_CELL_IT_v" quantity="IT_L23/11/CELL_IT/v"/>
            <OutputColumn id="v_IT_L23_12_CELL_IT_v" quantity="IT_L23/12/CELL_IT/v"/>
            <OutputColumn id="v_IT_L23_13_CELL_IT_v" quantity="IT_L23/13/CELL_IT/v"/>
            <OutputColumn id="v_IT_L23_14_CELL_IT_v" quantity="IT_L23/14/CELL_IT/v"/>
            <OutputColumn id="v_IT_L23_15_CELL_IT_v" quantity="IT_L23/15/CELL_IT/v"/>
            <OutputColumn id="v_IT_L23_16_CELL_IT_v" quantity="IT_L23/16/CELL_IT/v"/>
            <OutputColumn id="v_IT_L23_17_CELL_IT_v" quantity="IT_L23/17/CELL_IT/v"/>
            <OutputColumn id="v_IT_L23_18_CELL_IT_v" quantity="IT_L23/18/CELL_IT/v"/>
            <OutputColumn id="v_IT_L23_19_CELL_IT_v" quantity="IT_L23/19/CELL_IT/v"/>
            <OutputColumn id="v_IT_L23_20_CELL_IT_v" quantity="IT_L23/20/CELL_IT/v"/>
            <OutputColumn id="v_IT_L23_21_CELL_IT_v" quantity="IT_L23/21/CELL_IT/v"/>
            <OutputColumn id="v_IT_L23_22_CELL_IT_v" quantity="IT_L23/22/CELL_IT/v"/>
            <OutputColumn id="v_IT_L23_23_CELL_IT_v" quantity="IT_L23/23/CELL_IT/v"/>
            <OutputColumn id="v_IT_L23_24_CELL_IT_v" quantity="IT_L23/24/CELL_IT/v"/>
            <OutputColumn id="v_IT_L23_25_CELL_IT_v" quantity="IT_L23/25/CELL_IT/v"/>
            <OutputColumn id="v_IT_L23_26_CELL_IT_v" quantity="IT_L23/26/CELL_IT/v"/>
            <OutputColumn id="v_IT_L23_27_CELL_IT_v" quantity="IT_L23/27/CELL_IT/v"/>
            <OutputColumn id="v_IT_L23_28_CELL_IT_v" quantity="IT_L23/28/CELL_IT/v"/>
            <OutputColumn id="v_IT_L23_29_CELL_IT_v" quantity="IT_L23/29/CELL_IT/v"/>
            <OutputColumn id="v_IT_L23_30_CELL_IT_v" quantity="IT_L23/30/CELL_IT/v"/>
            <OutputColumn id="v_IT_L23_31_CELL_IT_v" quantity="IT_L23/31/CELL_IT/v"/>
            <OutputColumn id="v_IT_L23_32_CELL_IT_v" quantity="IT_L23/32/CELL_IT/v"/>
            <OutputColumn id="v_IT_L23_33_CELL_IT_v" quantity="IT_L23/33/CELL_IT/v"/>
            <OutputColumn id="v_IT_L23_34_CELL_IT_v" quantity="IT_L23/34/CELL_IT/v"/>
            <OutputColumn id="v_IT_L23_35_CELL_IT_v" quantity="IT_L23/35/CELL_IT/v"/>
            <OutputColumn id="v_IT_L23_36_CELL_IT_v" quantity="IT_L23/36/CELL_IT/v"/>
            <OutputColumn id="v_IT_L23_37_CELL_IT_v" quantity="IT_L23/37/CELL_IT/v"/>
            <OutputColumn id="v_IT_L23_38_CELL_IT_v" quantity="IT_L23/38/CELL_IT/v"/>
            <OutputColumn id="v_IT_L23_39_CELL_IT_v" quantity="IT_L23/39/CELL_IT/v"/>
            <OutputColumn id="v_IT_L23_40_CELL_IT_v" quantity="IT_L23/40/CELL_IT/v"/>
            <OutputColumn id="v_IT_L23_41_CELL_IT_v" quantity="IT_L23/41/CELL_IT/v"/>
            <OutputColumn id="v_IT_L23_42_CELL_IT_v" quantity="IT_L23/42/CELL_IT/v"/>
            <OutputColumn id="v_IT_L23_43_CELL_IT_v" quantity="IT_L23/43/CELL_IT/v"/>
            <OutputColumn id="v_IT_L23_44_CELL_IT_v" quantity="IT_L23/44/CELL_IT/v"/>
            <OutputColumn id="v_IT_L23_45_CELL_IT_v" quantity="IT_L23/45/CELL_IT/v"/>
            <OutputColumn id="v_IT_L23_46_CELL_IT_v" quantity="IT_L23/46/CELL_IT/v"/>
            <OutputColumn id="v_IT_L23_47_CELL_IT_v" quantity="IT_L23/47/CELL_IT/v"/>
            <OutputColumn id="v_IT_L23_48_CELL_IT_v" quantity="IT_L23/48/CELL_IT/v"/>
            <OutputColumn id="v_IT_L23_49_CELL_IT_v" quantity="IT_L23/49/CELL_IT/v"/>
            <OutputColumn id="v_IT_L23_50_CELL_IT_v" quantity="IT_L23/50/CELL_IT/v"/>
        </OutputFile>

        <OutputFile id="Volts_file__IT_L4" fileName="Sim_M1.IT_L4.v.dat">
            <OutputColumn id="v_IT_L4_0_CELL_IT_v" quantity="IT_L4/0/CELL_IT/v"/>
            <OutputColumn id="v_IT_L4_1_CELL_IT_v" quantity="IT_L4/1/CELL_IT/v"/>
            <OutputColumn id="v_IT_L4_2_CELL_IT_v" quantity="IT_L4/2/CELL_IT/v"/>
            <OutputColumn id="v_IT_L4_3_CELL_IT_v" quantity="IT_L4/3/CELL_IT/v"/>
            <OutputColumn id="v_IT_L4_4_CELL_IT_v" quantity="IT_L4/4/CELL_IT/v"/>
            <OutputColumn id="v_IT_L4_5_CELL_IT_v" quantity="IT_L4/5/CELL_IT/v"/>
            <OutputColumn id="v_IT_L4_6_CELL_IT_v" quantity="IT_L4/6/CELL_IT/v"/>
            <OutputColumn id="v_IT_L4_7_CELL_IT_v" quantity="IT_L4/7/CELL_IT/v"/>
            <OutputColumn id="v_IT_L4_8_CELL_IT_v" quantity="IT_L4/8/CELL_IT/v"/>
            <OutputColumn id="v_IT_L4_9_CELL_IT_v" quantity="IT_L4/9/CELL_IT/v"/>
            <OutputColumn id="v_IT_L4_10_CELL_IT_v" quantity="IT_L4/10/CELL_IT/v"/>
            <OutputColumn id="v_IT_L4_11_CELL_IT_v" quantity="IT_L4/11/CELL_IT/v"/>
            <OutputColumn id="v_IT_L4_12_CELL_IT_v" quantity="IT_L4/12/CELL_IT/v"/>
            <OutputColumn id="v_IT_L4_13_CELL_IT_v" quantity="IT_L4/13/CELL_IT/v"/>
            <OutputColumn id="v_IT_L4_14_CELL_IT_v" quantity="IT_L4/14/CELL_IT/v"/>
            <OutputColumn id="v_IT_L4_15_CELL_IT_v" quantity="IT_L4/15/CELL_IT/v"/>
            <OutputColumn id="v_IT_L4_16_CELL_IT_v" quantity="IT_L4/16/CELL_IT/v"/>
            <OutputColumn id="v_IT_L4_17_CELL_IT_v" quantity="IT_L4/17/CELL_IT/v"/>
            <OutputColumn id="v_IT_L4_18_CELL_IT_v" quantity="IT_L4/18/CELL_IT/v"/>
            <OutputColumn id="v_IT_L4_19_CELL_IT_v" quantity="IT_L4/19/CELL_IT/v"/>
            <OutputColumn id="v_IT_L4_20_CELL_IT_v" quantity="IT_L4/20/CELL_IT/v"/>
            <OutputColumn id="v_IT_L4_21_CELL_IT_v" quantity="IT_L4/21/CELL_IT/v"/>
            <OutputColumn id="v_IT_L4_22_CELL_IT_v" quantity="IT_L4/22/CELL_IT/v"/>
            <OutputColumn id="v_IT_L4_23_CELL_IT_v" quantity="IT_L4/23/CELL_IT/v"/>
            <OutputColumn id="v_IT_L4_24_CELL_IT_v" quantity="IT_L4/24/CELL_IT/v"/>
            <OutputColumn id="v_IT_L4_25_CELL_IT_v" quantity="IT_L4/25/CELL_IT/v"/>
        </OutputFile>

        <OutputFile id="Volts_file__IT_L5A" fileName="Sim_M1.IT_L5A.v.dat">
            <OutputColumn id="v_IT_L5A_0_CELL_IT_v" quantity="IT_L5A/0/CELL_IT/v"/>
            <OutputColumn id="v_IT_L5A_1_CELL_IT_v" quantity="IT_L5A/1/CELL_IT/v"/>
            <OutputColumn id="v_IT_L5A_2_CELL_IT_v" quantity="IT_L5A/2/CELL_IT/v"/>
            <OutputColumn id="v_IT_L5A_3_CELL_IT_v" quantity="IT_L5A/3/CELL_IT/v"/>
            <OutputColumn id="v_IT_L5A_4_CELL_IT_v" quantity="IT_L5A/4/CELL_IT/v"/>
            <OutputColumn id="v_IT_L5A_5_CELL_IT_v" quantity="IT_L5A/5/CELL_IT/v"/>
            <OutputColumn id="v_IT_L5A_6_CELL_IT_v" quantity="IT_L5A/6/CELL_IT/v"/>
            <OutputColumn id="v_IT_L5A_7_CELL_IT_v" quantity="IT_L5A/7/CELL_IT/v"/>
            <OutputColumn id="v_IT_L5A_8_CELL_IT_v" quantity="IT_L5A/8/CELL_IT/v"/>
            <OutputColumn id="v_IT_L5A_9_CELL_IT_v" quantity="IT_L5A/9/CELL_IT/v"/>
            <OutputColumn id="v_IT_L5A_10_CELL_IT_v" quantity="IT_L5A/10/CELL_IT/v"/>
            <OutputColumn id="v_IT_L5A_11_CELL_IT_v" quantity="IT_L5A/11/CELL_IT/v"/>
            <OutputColumn id="v_IT_L5A_12_CELL_IT_v" quantity="IT_L5A/12/CELL_IT/v"/>
            <OutputColumn id="v_IT_L5A_13_CELL_IT_v" quantity="IT_L5A/13/CELL_IT/v"/>
            <OutputColumn id="v_IT_L5A_14_CELL_IT_v" quantity="IT_L5A/14/CELL_IT/v"/>
            <OutputColumn id="v_IT_L5A_15_CELL_IT_v" quantity="IT_L5A/15/CELL_IT/v"/>
            <OutputColumn id="v_IT_L5A_16_CELL_IT_v" quantity="IT_L5A/16/CELL_IT/v"/>
            <OutputColumn id="v_IT_L5A_17_CELL_IT_v" quantity="IT_L5A/17/CELL_IT/v"/>
            <OutputColumn id="v_IT_L5A_18_CELL_IT_v" quantity="IT_L5A/18/CELL_IT/v"/>
            <OutputColumn id="v_IT_L5A_19_CELL_IT_v" quantity="IT_L5A/19/CELL_IT/v"/>
            <OutputColumn id="v_IT_L5A_20_CELL_IT_v" quantity="IT_L5A/20/CELL_IT/v"/>
            <OutputColumn id="v_IT_L5A_21_CELL_IT_v" quantity="IT_L5A/21/CELL_IT/v"/>
            <OutputColumn id="v_IT_L5A_22_CELL_IT_v" quantity="IT_L5A/22/CELL_IT/v"/>
            <OutputColumn id="v_IT_L5A_23_CELL_IT_v" quantity="IT_L5A/23/CELL_IT/v"/>
            <OutputColumn id="v_IT_L5A_24_CELL_IT_v" quantity="IT_L5A/24/CELL_IT/v"/>
            <OutputColumn id="v_IT_L5A_25_CELL_IT_v" quantity="IT_L5A/25/CELL_IT/v"/>
            <OutputColumn id="v_IT_L5A_26_CELL_IT_v" quantity="IT_L5A/26/CELL_IT/v"/>
            <OutputColumn id="v_IT_L5A_27_CELL_IT_v" quantity="IT_L5A/27/CELL_IT/v"/>
            <OutputColumn id="v_IT_L5A_28_CELL_IT_v" quantity="IT_L5A/28/CELL_IT/v"/>
        </OutputFile>

        <OutputFile id="Volts_file__IT_L5B" fileName="Sim_M1.IT_L5B.v.dat">
            <OutputColumn id="v_IT_L5B_0_CELL_IT_v" quantity="IT_L5B/0/CELL_IT/v"/>
            <OutputColumn id="v_IT_L5B_1_CELL_IT_v" quantity="IT_L5B/1/CELL_IT/v"/>
            <OutputColumn id="v_IT_L5B_2_CELL_IT_v" quantity="IT_L5B/2/CELL_IT/v"/>
            <OutputColumn id="v_IT_L5B_3_CELL_IT_v" quantity="IT_L5B/3/CELL_IT/v"/>
            <OutputColumn id="v_IT_L5B_4_CELL_IT_v" quantity="IT_L5B/4/CELL_IT/v"/>
            <OutputColumn id="v_IT_L5B_5_CELL_IT_v" quantity="IT_L5B/5/CELL_IT/v"/>
            <OutputColumn id="v_IT_L5B_6_CELL_IT_v" quantity="IT_L5B/6/CELL_IT/v"/>
            <OutputColumn id="v_IT_L5B_7_CELL_IT_v" quantity="IT_L5B/7/CELL_IT/v"/>
            <OutputColumn id="v_IT_L5B_8_CELL_IT_v" quantity="IT_L5B/8/CELL_IT/v"/>
            <OutputColumn id="v_IT_L5B_9_CELL_IT_v" quantity="IT_L5B/9/CELL_IT/v"/>
            <OutputColumn id="v_IT_L5B_10_CELL_IT_v" quantity="IT_L5B/10/CELL_IT/v"/>
            <OutputColumn id="v_IT_L5B_11_CELL_IT_v" quantity="IT_L5B/11/CELL_IT/v"/>
            <OutputColumn id="v_IT_L5B_12_CELL_IT_v" quantity="IT_L5B/12/CELL_IT/v"/>
            <OutputColumn id="v_IT_L5B_13_CELL_IT_v" quantity="IT_L5B/13/CELL_IT/v"/>
            <OutputColumn id="v_IT_L5B_14_CELL_IT_v" quantity="IT_L5B/14/CELL_IT/v"/>
            <OutputColumn id="v_IT_L5B_15_CELL_IT_v" quantity="IT_L5B/15/CELL_IT/v"/>
            <OutputColumn id="v_IT_L5B_16_CELL_IT_v" quantity="IT_L5B/16/CELL_IT/v"/>
            <OutputColumn id="v_IT_L5B_17_CELL_IT_v" quantity="IT_L5B/17/CELL_IT/v"/>
            <OutputColumn id="v_IT_L5B_18_CELL_IT_v" quantity="IT_L5B/18/CELL_IT/v"/>
            <OutputColumn id="v_IT_L5B_19_CELL_IT_v" quantity="IT_L5B/19/CELL_IT/v"/>
            <OutputColumn id="v_IT_L5B_20_CELL_IT_v" quantity="IT_L5B/20/CELL_IT/v"/>
            <OutputColumn id="v_IT_L5B_21_CELL_IT_v" quantity="IT_L5B/21/CELL_IT/v"/>
            <OutputColumn id="v_IT_L5B_22_CELL_IT_v" quantity="IT_L5B/22/CELL_IT/v"/>
            <OutputColumn id="v_IT_L5B_23_CELL_IT_v" quantity="IT_L5B/23/CELL_IT/v"/>
            <OutputColumn id="v_IT_L5B_24_CELL_IT_v" quantity="IT_L5B/24/CELL_IT/v"/>
            <OutputColumn id="v_IT_L5B_25_CELL_IT_v" quantity="IT_L5B/25/CELL_IT/v"/>
            <OutputColumn id="v_IT_L5B_26_CELL_IT_v" quantity="IT_L5B/26/CELL_IT/v"/>
            <OutputColumn id="v_IT_L5B_27_CELL_IT_v" quantity="IT_L5B/27/CELL_IT/v"/>
            <OutputColumn id="v_IT_L5B_28_CELL_IT_v" quantity="IT_L5B/28/CELL_IT/v"/>
            <OutputColumn id="v_IT_L5B_29_CELL_IT_v" quantity="IT_L5B/29/CELL_IT/v"/>
            <OutputColumn id="v_IT_L5B_30_CELL_IT_v" quantity="IT_L5B/30/CELL_IT/v"/>
            <OutputColumn id="v_IT_L5B_31_CELL_IT_v" quantity="IT_L5B/31/CELL_IT/v"/>
            <OutputColumn id="v_IT_L5B_32_CELL_IT_v" quantity="IT_L5B/32/CELL_IT/v"/>
        </OutputFile>

        <OutputFile id="Volts_file__PT_L5B" fileName="Sim_M1.PT_L5B.v.dat">
            <OutputColumn id="v_PT_L5B_0_CELL_PT_v" quantity="PT_L5B/0/CELL_PT/v"/>
            <OutputColumn id="v_PT_L5B_1_CELL_PT_v" quantity="PT_L5B/1/CELL_PT/v"/>
            <OutputColumn id="v_PT_L5B_2_CELL_PT_v" quantity="PT_L5B/2/CELL_PT/v"/>
            <OutputColumn id="v_PT_L5B_3_CELL_PT_v" quantity="PT_L5B/3/CELL_PT/v"/>
            <OutputColumn id="v_PT_L5B_4_CELL_PT_v" quantity="PT_L5B/4/CELL_PT/v"/>
            <OutputColumn id="v_PT_L5B_5_CELL_PT_v" quantity="PT_L5B/5/CELL_PT/v"/>
            <OutputColumn id="v_PT_L5B_6_CELL_PT_v" quantity="PT_L5B/6/CELL_PT/v"/>
            <OutputColumn id="v_PT_L5B_7_CELL_PT_v" quantity="PT_L5B/7/CELL_PT/v"/>
            <OutputColumn id="v_PT_L5B_8_CELL_PT_v" quantity="PT_L5B/8/CELL_PT/v"/>
            <OutputColumn id="v_PT_L5B_9_CELL_PT_v" quantity="PT_L5B/9/CELL_PT/v"/>
            <OutputColumn id="v_PT_L5B_10_CELL_PT_v" quantity="PT_L5B/10/CELL_PT/v"/>
            <OutputColumn id="v_PT_L5B_11_CELL_PT_v" quantity="PT_L5B/11/CELL_PT/v"/>
            <OutputColumn id="v_PT_L5B_12_CELL_PT_v" quantity="PT_L5B/12/CELL_PT/v"/>
            <OutputColumn id="v_PT_L5B_13_CELL_PT_v" quantity="PT_L5B/13/CELL_PT/v"/>
            <OutputColumn id="v_PT_L5B_14_CELL_PT_v" quantity="PT_L5B/14/CELL_PT/v"/>
            <OutputColumn id="v_PT_L5B_15_CELL_PT_v" quantity="PT_L5B/15/CELL_PT/v"/>
            <OutputColumn id="v_PT_L5B_16_CELL_PT_v" quantity="PT_L5B/16/CELL_PT/v"/>
            <OutputColumn id="v_PT_L5B_17_CELL_PT_v" quantity="PT_L5B/17/CELL_PT/v"/>
            <OutputColumn id="v_PT_L5B_18_CELL_PT_v" quantity="PT_L5B/18/CELL_PT/v"/>
            <OutputColumn id="v_PT_L5B_19_CELL_PT_v" quantity="PT_L5B/19/CELL_PT/v"/>
            <OutputColumn id="v_PT_L5B_20_CELL_PT_v" quantity="PT_L5B/20/CELL_PT/v"/>
            <OutputColumn id="v_PT_L5B_21_CELL_PT_v" quantity="PT_L5B/21/CELL_PT/v"/>
            <OutputColumn id="v_PT_L5B_22_CELL_PT_v" quantity="PT_L5B/22/CELL_PT/v"/>
            <OutputColumn id="v_PT_L5B_23_CELL_PT_v" quantity="PT_L5B/23/CELL_PT/v"/>
            <OutputColumn id="v_PT_L5B_24_CELL_PT_v" quantity="PT_L5B/24/CELL_PT/v"/>
            <OutputColumn id="v_PT_L5B_25_CELL_PT_v" quantity="PT_L5B/25/CELL_PT/v"/>
            <OutputColumn id="v_PT_L5B_26_CELL_PT_v" quantity="PT_L5B/26/CELL_PT/v"/>
            <OutputColumn id="v_PT_L5B_27_CELL_PT_v" quantity="PT_L5B/27/CELL_PT/v"/>
            <OutputColumn id="v_PT_L5B_28_CELL_PT_v" quantity="PT_L5B/28/CELL_PT/v"/>
            <OutputColumn id="v_PT_L5B_29_CELL_PT_v" quantity="PT_L5B/29/CELL_PT/v"/>
            <OutputColumn id="v_PT_L5B_30_CELL_PT_v" quantity="PT_L5B/30/CELL_PT/v"/>
            <OutputColumn id="v_PT_L5B_31_CELL_PT_v" quantity="PT_L5B/31/CELL_PT/v"/>
            <OutputColumn id="v_PT_L5B_32_CELL_PT_v" quantity="PT_L5B/32/CELL_PT/v"/>
        </OutputFile>

        <OutputFile id="Volts_file__IT_L6" fileName="Sim_M1.IT_L6.v.dat">
            <OutputColumn id="v_IT_L6_0_CELL_IT_v" quantity="IT_L6/0/CELL_IT/v"/>
            <OutputColumn id="v_IT_L6_1_CELL_IT_v" quantity="IT_L6/1/CELL_IT/v"/>
            <OutputColumn id="v_IT_L6_2_CELL_IT_v" quantity="IT_L6/2/CELL_IT/v"/>
            <OutputColumn id="v_IT_L6_3_CELL_IT_v" quantity="IT_L6/3/CELL_IT/v"/>
            <OutputColumn id="v_IT_L6_4_CELL_IT_v" quantity="IT_L6/4/CELL_IT/v"/>
            <OutputColumn id="v_IT_L6_5_CELL_IT_v" quantity="IT_L6/5/CELL_IT/v"/>
            <OutputColumn id="v_IT_L6_6_CELL_IT_v" quantity="IT_L6/6/CELL_IT/v"/>
            <OutputColumn id="v_IT_L6_7_CELL_IT_v" quantity="IT_L6/7/CELL_IT/v"/>
            <OutputColumn id="v_IT_L6_8_CELL_IT_v" quantity="IT_L6/8/CELL_IT/v"/>
            <OutputColumn id="v_IT_L6_9_CELL_IT_v" quantity="IT_L6/9/CELL_IT/v"/>
            <OutputColumn id="v_IT_L6_10_CELL_IT_v" quantity="IT_L6/10/CELL_IT/v"/>
            <OutputColumn id="v_IT_L6_11_CELL_IT_v" quantity="IT_L6/11/CELL_IT/v"/>
            <OutputColumn id="v_IT_L6_12_CELL_IT_v" quantity="IT_L6/12/CELL_IT/v"/>
            <OutputColumn id="v_IT_L6_13_CELL_IT_v" quantity="IT_L6/13/CELL_IT/v"/>
            <OutputColumn id="v_IT_L6_14_CELL_IT_v" quantity="IT_L6/14/CELL_IT/v"/>
            <OutputColumn id="v_IT_L6_15_CELL_IT_v" quantity="IT_L6/15/CELL_IT/v"/>
            <OutputColumn id="v_IT_L6_16_CELL_IT_v" quantity="IT_L6/16/CELL_IT/v"/>
            <OutputColumn id="v_IT_L6_17_CELL_IT_v" quantity="IT_L6/17/CELL_IT/v"/>
            <OutputColumn id="v_IT_L6_18_CELL_IT_v" quantity="IT_L6/18/CELL_IT/v"/>
            <OutputColumn id="v_IT_L6_19_CELL_IT_v" quantity="IT_L6/19/CELL_IT/v"/>
            <OutputColumn id="v_IT_L6_20_CELL_IT_v" quantity="IT_L6/20/CELL_IT/v"/>
            <OutputColumn id="v_IT_L6_21_CELL_IT_v" quantity="IT_L6/21/CELL_IT/v"/>
            <OutputColumn id="v_IT_L6_22_CELL_IT_v" quantity="IT_L6/22/CELL_IT/v"/>
            <OutputColumn id="v_IT_L6_23_CELL_IT_v" quantity="IT_L6/23/CELL_IT/v"/>
            <OutputColumn id="v_IT_L6_24_CELL_IT_v" quantity="IT_L6/24/CELL_IT/v"/>
            <OutputColumn id="v_IT_L6_25_CELL_IT_v" quantity="IT_L6/25/CELL_IT/v"/>
            <OutputColumn id="v_IT_L6_26_CELL_IT_v" quantity="IT_L6/26/CELL_IT/v"/>
            <OutputColumn id="v_IT_L6_27_CELL_IT_v" quantity="IT_L6/27/CELL_IT/v"/>
            <OutputColumn id="v_IT_L6_28_CELL_IT_v" quantity="IT_L6/28/CELL_IT/v"/>
            <OutputColumn id="v_IT_L6_29_CELL_IT_v" quantity="IT_L6/29/CELL_IT/v"/>
            <OutputColumn id="v_IT_L6_30_CELL_IT_v" quantity="IT_L6/30/CELL_IT/v"/>
        </OutputFile>

        <OutputFile id="Volts_file__CT_L6" fileName="Sim_M1.CT_L6.v.dat">
            <OutputColumn id="v_CT_L6_0_CELL_CT_v" quantity="CT_L6/0/CELL_CT/v"/>
            <OutputColumn id="v_CT_L6_1_CELL_CT_v" quantity="CT_L6/1/CELL_CT/v"/>
            <OutputColumn id="v_CT_L6_2_CELL_CT_v" quantity="CT_L6/2/CELL_CT/v"/>
            <OutputColumn id="v_CT_L6_3_CELL_CT_v" quantity="CT_L6/3/CELL_CT/v"/>
            <OutputColumn id="v_CT_L6_4_CELL_CT_v" quantity="CT_L6/4/CELL_CT/v"/>
            <OutputColumn id="v_CT_L6_5_CELL_CT_v" quantity="CT_L6/5/CELL_CT/v"/>
            <OutputColumn id="v_CT_L6_6_CELL_CT_v" quantity="CT_L6/6/CELL_CT/v"/>
            <OutputColumn id="v_CT_L6_7_CELL_CT_v" quantity="CT_L6/7/CELL_CT/v"/>
            <OutputColumn id="v_CT_L6_8_CELL_CT_v" quantity="CT_L6/8/CELL_CT/v"/>
            <OutputColumn id="v_CT_L6_9_CELL_CT_v" quantity="CT_L6/9/CELL_CT/v"/>
            <OutputColumn id="v_CT_L6_10_CELL_CT_v" quantity="CT_L6/10/CELL_CT/v"/>
            <OutputColumn id="v_CT_L6_11_CELL_CT_v" quantity="CT_L6/11/CELL_CT/v"/>
            <OutputColumn id="v_CT_L6_12_CELL_CT_v" quantity="CT_L6/12/CELL_CT/v"/>
            <OutputColumn id="v_CT_L6_13_CELL_CT_v" quantity="CT_L6/13/CELL_CT/v"/>
            <OutputColumn id="v_CT_L6_14_CELL_CT_v" quantity="CT_L6/14/CELL_CT/v"/>
            <OutputColumn id="v_CT_L6_15_CELL_CT_v" quantity="CT_L6/15/CELL_CT/v"/>
            <OutputColumn id="v_CT_L6_16_CELL_CT_v" quantity="CT_L6/16/CELL_CT/v"/>
            <OutputColumn id="v_CT_L6_17_CELL_CT_v" quantity="CT_L6/17/CELL_CT/v"/>
            <OutputColumn id="v_CT_L6_18_CELL_CT_v" quantity="CT_L6/18/CELL_CT/v"/>
            <OutputColumn id="v_CT_L6_19_CELL_CT_v" quantity="CT_L6/19/CELL_CT/v"/>
            <OutputColumn id="v_CT_L6_20_CELL_CT_v" quantity="CT_L6/20/CELL_CT/v"/>
            <OutputColumn id="v_CT_L6_21_CELL_CT_v" quantity="CT_L6/21/CELL_CT/v"/>
            <OutputColumn id="v_CT_L6_22_CELL_CT_v" quantity="CT_L6/22/CELL_CT/v"/>
            <OutputColumn id="v_CT_L6_23_CELL_CT_v" quantity="CT_L6/23/CELL_CT/v"/>
            <OutputColumn id="v_CT_L6_24_CELL_CT_v" quantity="CT_L6/24/CELL_CT/v"/>
            <OutputColumn id="v_CT_L6_25_CELL_CT_v" quantity="CT_L6/25/CELL_CT/v"/>
            <OutputColumn id="v_CT_L6_26_CELL_CT_v" quantity="CT_L6/26/CELL_CT/v"/>
            <OutputColumn id="v_CT_L6_27_CELL_CT_v" quantity="CT_L6/27/CELL_CT/v"/>
            <OutputColumn id="v_CT_L6_28_CELL_CT_v" quantity="CT_L6/28/CELL_CT/v"/>
            <OutputColumn id="v_CT_L6_29_CELL_CT_v" quantity="CT_L6/29/CELL_CT/v"/>
            <OutputColumn id="v_CT_L6_30_CELL_CT_v" quantity="CT_L6/30/CELL_CT/v"/>
        </OutputFile>

        <OutputFile id="Volts_file__PV_L23" fileName="Sim_M1.PV_L23.v.dat">
            <OutputColumn id="v_PV_L23_0_CELL_PV_v" quantity="PV_L23/0/CELL_PV/v"/>
            <OutputColumn id="v_PV_L23_1_CELL_PV_v" quantity="PV_L23/1/CELL_PV/v"/>
            <OutputColumn id="v_PV_L23_2_CELL_PV_v" quantity="PV_L23/2/CELL_PV/v"/>
            <OutputColumn id="v_PV_L23_3_CELL_PV_v" quantity="PV_L23/3/CELL_PV/v"/>
            <OutputColumn id="v_PV_L23_4_CELL_PV_v" quantity="PV_L23/4/CELL_PV/v"/>
            <OutputColumn id="v_PV_L23_5_CELL_PV_v" quantity="PV_L23/5/CELL_PV/v"/>
            <OutputColumn id="v_PV_L23_6_CELL_PV_v" quantity="PV_L23/6/CELL_PV/v"/>
        </OutputFile>

        <OutputFile id="Volts_file__SOM_L23" fileName="Sim_M1.SOM_L23.v.dat">
            <OutputColumn id="v_SOM_L23_0_CELL_SOM_v" quantity="SOM_L23/0/CELL_SOM/v"/>
            <OutputColumn id="v_SOM_L23_1_CELL_SOM_v" quantity="SOM_L23/1/CELL_SOM/v"/>
            <OutputColumn id="v_SOM_L23_2_CELL_SOM_v" quantity="SOM_L23/2/CELL_SOM/v"/>
            <OutputColumn id="v_SOM_L23_3_CELL_SOM_v" quantity="SOM_L23/3/CELL_SOM/v"/>
            <OutputColumn id="v_SOM_L23_4_CELL_SOM_v" quantity="SOM_L23/4/CELL_SOM/v"/>
            <OutputColumn id="v_SOM_L23_5_CELL_SOM_v" quantity="SOM_L23/5/CELL_SOM/v"/>
            <OutputColumn id="v_SOM_L23_6_CELL_SOM_v" quantity="SOM_L23/6/CELL_SOM/v"/>
        </OutputFile>

        <OutputFile id="Volts_file__PV_L5" fileName="Sim_M1.PV_L5.v.dat">
            <OutputColumn id="v_PV_L5_0_CELL_PV_v" quantity="PV_L5/0/CELL_PV/v"/>
            <OutputColumn id="v_PV_L5_1_CELL_PV_v" quantity="PV_L5/1/CELL_PV/v"/>
            <OutputColumn id="v_PV_L5_2_CELL_PV_v" quantity="PV_L5/2/CELL_PV/v"/>
            <OutputColumn id="v_PV_L5_3_CELL_PV_v" quantity="PV_L5/3/CELL_PV/v"/>
            <OutputColumn id="v_PV_L5_4_CELL_PV_v" quantity="PV_L5/4/CELL_PV/v"/>
            <OutputColumn id="v_PV_L5_5_CELL_PV_v" quantity="PV_L5/5/CELL_PV/v"/>
            <OutputColumn id="v_PV_L5_6_CELL_PV_v" quantity="PV_L5/6/CELL_PV/v"/>
            <OutputColumn id="v_PV_L5_7_CELL_PV_v" quantity="PV_L5/7/CELL_PV/v"/>
            <OutputColumn id="v_PV_L5_8_CELL_PV_v" quantity="PV_L5/8/CELL_PV/v"/>
            <OutputColumn id="v_PV_L5_9_CELL_PV_v" quantity="PV_L5/9/CELL_PV/v"/>
            <OutputColumn id="v_PV_L5_10_CELL_PV_v" quantity="PV_L5/10/CELL_PV/v"/>
            <OutputColumn id="v_PV_L5_11_CELL_PV_v" quantity="PV_L5/11/CELL_PV/v"/>
            <OutputColumn id="v_PV_L5_12_CELL_PV_v" quantity="PV_L5/12/CELL_PV/v"/>
            <OutputColumn id="v_PV_L5_13_CELL_PV_v" quantity="PV_L5/13/CELL_PV/v"/>
            <OutputColumn id="v_PV_L5_14_CELL_PV_v" quantity="PV_L5/14/CELL_PV/v"/>
        </OutputFile>

        <OutputFile id="Volts_file__SOM_L5" fileName="Sim_M1.SOM_L5.v.dat">
            <OutputColumn id="v_SOM_L5_0_CELL_SOM_v" quantity="SOM_L5/0/CELL_SOM/v"/>
            <OutputColumn id="v_SOM_L5_1_CELL_SOM_v" quantity="SOM_L5/1/CELL_SOM/v"/>
            <OutputColumn id="v_SOM_L5_2_CELL_SOM_v" quantity="SOM_L5/2/CELL_SOM/v"/>
            <OutputColumn id="v_SOM_L5_3_CELL_SOM_v" quantity="SOM_L5/3/CELL_SOM/v"/>
            <OutputColumn id="v_SOM_L5_4_CELL_SOM_v" quantity="SOM_L5/4/CELL_SOM/v"/>
            <OutputColumn id="v_SOM_L5_5_CELL_SOM_v" quantity="SOM_L5/5/CELL_SOM/v"/>
            <OutputColumn id="v_SOM_L5_6_CELL_SOM_v" quantity="SOM_L5/6/CELL_SOM/v"/>
            <OutputColumn id="v_SOM_L5_7_CELL_SOM_v" quantity="SOM_L5/7/CELL_SOM/v"/>
            <OutputColumn id="v_SOM_L5_8_CELL_SOM_v" quantity="SOM_L5/8/CELL_SOM/v"/>
            <OutputColumn id="v_SOM_L5_9_CELL_SOM_v" quantity="SOM_L5/9/CELL_SOM/v"/>
            <OutputColumn id="v_SOM_L5_10_CELL_SOM_v" quantity="SOM_L5/10/CELL_SOM/v"/>
            <OutputColumn id="v_SOM_L5_11_CELL_SOM_v" quantity="SOM_L5/11/CELL_SOM/v"/>
            <OutputColumn id="v_SOM_L5_12_CELL_SOM_v" quantity="SOM_L5/12/CELL_SOM/v"/>
            <OutputColumn id="v_SOM_L5_13_CELL_SOM_v" quantity="SOM_L5/13/CELL_SOM/v"/>
            <OutputColumn id="v_SOM_L5_14_CELL_SOM_v" quantity="SOM_L5/14/CELL_SOM/v"/>
        </OutputFile>

        <OutputFile id="Volts_file__PV_L6" fileName="Sim_M1.PV_L6.v.dat">
            <OutputColumn id="v_PV_L6_0_CELL_PV_v" quantity="PV_L6/0/CELL_PV/v"/>
            <OutputColumn id="v_PV_L6_1_CELL_PV_v" quantity="PV_L6/1/CELL_PV/v"/>
            <OutputColumn id="v_PV_L6_2_CELL_PV_v" quantity="PV_L6/2/CELL_PV/v"/>
            <OutputColumn id="v_PV_L6_3_CELL_PV_v" quantity="PV_L6/3/CELL_PV/v"/>
            <OutputColumn id="v_PV_L6_4_CELL_PV_v" quantity="PV_L6/4/CELL_PV/v"/>
            <OutputColumn id="v_PV_L6_5_CELL_PV_v" quantity="PV_L6/5/CELL_PV/v"/>
            <OutputColumn id="v_PV_L6_6_CELL_PV_v" quantity="PV_L6/6/CELL_PV/v"/>
        </OutputFile>

        <OutputFile id="Volts_file__SOM_L6" fileName="Sim_M1.SOM_L6.v.dat">
            <OutputColumn id="v_SOM_L6_0_CELL_SOM_v" quantity="SOM_L6/0/CELL_SOM/v"/>
            <OutputColumn id="v_SOM_L6_1_CELL_SOM_v" quantity="SOM_L6/1/CELL_SOM/v"/>
            <OutputColumn id="v_SOM_L6_2_CELL_SOM_v" quantity="SOM_L6/2/CELL_SOM/v"/>
            <OutputColumn id="v_SOM_L6_3_CELL_SOM_v" quantity="SOM_L6/3/CELL_SOM/v"/>
            <OutputColumn id="v_SOM_L6_4_CELL_SOM_v" quantity="SOM_L6/4/CELL_SOM/v"/>
            <OutputColumn id="v_SOM_L6_5_CELL_SOM_v" quantity="SOM_L6/5/CELL_SOM/v"/>
            <OutputColumn id="v_SOM_L6_6_CELL_SOM_v" quantity="SOM_L6/6/CELL_SOM/v"/>
        </OutputFile>

    </Simulation>

</Lems>
