<neuroml xmlns="http://www.neuroml.org/schema/neuroml2"  xmlns:xs="http://www.w3.org/2001/XMLSchema" xmlns:xsi="http://www.w3.org/2001/XMLSchema-instance" xsi:schemaLocation="http://www.neuroml.org/schema/neuroml2 https://raw.github.com/NeuroML/NeuroML2/development/Schemas/NeuroML2/NeuroML_v2beta4.xsd" id="M1">
    <notes>NeuroML 2 file exported from NetPyNE</notes>
    <include href="Izhi2007b.cell.nml"></include>
    <include href="Izhi2007b.cell.nml"></include>
    <include href="Izhi2007b.cell.nml"></include>
    <include href="Izhi2007b.cell.nml"></include>
    <include href="Izhi2007b.cell.nml"></include>
    <include href="Izhi2007b.cell.nml"></include>
    <include href="Izhi2007b.cell.nml"></include>
    <include href="Izhi2007b.cell.nml"></include>
    <include href="Izhi2007b.cell.nml"></include>
    <include href="Izhi2007b.cell.nml"></include>
    <include href="Izhi2007b.cell.nml"></include>
    <include href="Izhi2007b.cell.nml"></include>
    <include href="Izhi2007b.cell.nml"></include>
    <include href="Izhi2007b.cell.nml"></include>
    <include href="HH.cell.nml"></include>
    <expTwoSynapse id="AMPA" gbase="1uS" erev="0mV" tauDecay="5.3ms" tauRise="0.05ms"/>
    <expTwoSynapse id="NMDA" gbase="1uS" erev="0mV" tauDecay="1.5ms" tauRise="0.15ms"/>
    <expTwoSynapse id="GABAA" gbase="1uS" erev="-80mV" tauDecay="9.1ms" tauRise="0.07ms"/>
    <expTwoSynapse id="GABAB" gbase="1uS" erev="-80mV" tauDecay="9.1ms" tauRise="0.07ms"/>
    <network id="M1">
        <population id="IT_L23" component="Izhi2007b" type="populationList">
            <instance id="0">
                <location x="758.086015652552987" y="170.584895759335268" z="84.449803659466113"/>
            </instance>
            <instance id="1">
                <location x="128.719381713260816" y="278.810057370816764" z="94.201597751201774"/>
            </instance>
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        </population>
        <population id="IT_L4" component="Izhi2007b" type="populationList">
            <instance id="0">
                <location x="938.704444605826552" y="396.432779924792271" z="44.42593851802188"/>
            </instance>
            <instance id="1">
                <location x="972.825137189896623" y="430.253142928380214" z="12.910777797568551"/>
            </instance>
        </population>
        <population id="IT_L5A" component="Izhi2007b" type="populationList">
            <instance id="0">
                <location x="648.449229968942404" y="492.017675684127539" z="37.458845920177012"/>
            </instance>
            <instance id="1">
                <location x="314.282690947307742" y="634.063200299196978" z="92.503873822454182"/>
            </instance>
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        </population>
        <population id="IT_L5B" component="Izhi2007b" type="populationList">
            <instance id="0">
                <location x="353.212313561991664" y="812.163899623961242" z="33.558088468994164"/>
            </instance>
            <instance id="1">
                <location x="365.052543855509327" y="981.265714641901241" z="15.679082627833695"/>
            </instance>
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        </population>
        <population id="PT_L5B" component="Izhi2007b" type="populationList">
            <instance id="0">
                <location x="353.212313561991664" y="812.163899623961242" z="33.558088468994164"/>
            </instance>
            <instance id="1">
                <location x="365.052543855509327" y="981.265714641901241" z="15.679082627833695"/>
            </instance>
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        </population>
        <population id="IT_L6" component="Izhi2007b" type="populationList">
            <instance id="0">
                <location x="550.391956748141524" y="1184.590787654044561" z="46.544354300200794"/>
            </instance>
            <instance id="1">
                <location x="308.987743200124896" y="1340.164457470549223" z="24.089021610997317"/>
            </instance>
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        </population>
        <population id="CT_L6" component="Izhi2007b" type="populationList">
            <instance id="0">
                <location x="550.391956748141524" y="1184.590787654044561" z="46.544354300200794"/>
            </instance>
            <instance id="1">
                <location x="308.987743200124896" y="1340.164457470549223" z="24.089021610997317"/>
            </instance>
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        </population>
        <population id="PV_L23" component="Izhi2007b" type="populationList">
            <instance id="0">
                <location x="245.447003052908684" y="177.017675684127539" z="11.338144830900255"/>
            </instance>
            <instance id="1">
                <location x="396.75454197509606" y="319.063200299196978" z="26.851545424007227"/>
            </instance>
            <instance id="2">
                <location x="296.804838361169914" y="298.290588024938472" z="30.906810355282953"/>
            </instance>
            <instance id="3">
                <location x="518.9868348011953" y="195.015069445971278" z="2.634859290629943"/>
            </instance>
        </population>
        <population id="SOM_L23" component="Izhi2007b" type="populationList"/>
        <population id="PV_L5" component="Izhi2007b" type="populationList">
            <instance id="0">
                <location x="282.006018036233286" y="668.332937501691049" z="75.370230000277218"/>
            </instance>
            <instance id="1">
                <location x="348.243590978686598" y="922.354197746267914" z="8.882838873208732"/>
            </instance>
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        </population>
        <population id="SOM_L5" component="Izhi2007b" type="populationList">
            <instance id="0">
                <location x="282.006018036233286" y="668.332937501691049" z="75.370230000277218"/>
            </instance>
            <instance id="1">
                <location x="348.243590978686598" y="922.354197746267914" z="8.882838873208732"/>
            </instance>
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        </population>
        <population id="PV_L6" component="Izhi2007b" type="populationList">
            <instance id="0">
                <location x="758.086015652552987" y="1478.658778681883177" z="84.449803659466113"/>
            </instance>
            <instance id="1">
                <location x="128.719381713260816" y="1494.579839514382002" z="94.201597751201774"/>
            </instance>
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        </population>
        <population id="SOM_L6" component="Izhi2007b" type="populationList">
            <instance id="0">
                <location x="758.086015652552987" y="1478.658778681883177" z="84.449803659466113"/>
            </instance>
            <instance id="1">
                <location x="128.719381713260816" y="1494.579839514382002" z="94.201597751201774"/>
            </instance>
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        </population>
        <population id="IT_cells" component="Izhi2007b" type="populationList">
            <instance id="0">
                <location x="1." y="600." z="2."/>
            </instance>
            <instance id="1">
                <location x="2." y="750." z="3."/>
            </instance>
        </population>
        <population id="PT_cells" component="HH" type="populationList">
            <instance id="0">
                <location x="1." y="600." z="2."/>
            </instance>
            <instance id="1">
                <location x="2." y="750." z="3."/>
            </instance>
        </population>
    </network>
</neuroml>
